// SBML level 2 version 4

model untitled()

  // Compartments:
  compartment default = 1 volume;

  // Species:
  species _3_hydroxy_3_methlglutaryl_CoA in default = 0; _3_hydroxy_3_methlglutaryl_CoA is "3-hydroxy-3-methlglutaryl-CoA";
  species presqualene_PP in default = 0; presqualene_PP is "presqualene-PP";
  species squalene in default = 0;
  species FDFT1 in default = 0;
  species mevalonate_P in default = 0; mevalonate_P is "mevalonate-P";
  species MVK in default = 0;
  species mevalonate_PP in default = 0; mevalonate_PP is "mevalonate-PP";
  species PMVK in default = 0;
  species isopentenyl_PP in default = 0; isopentenyl_PP is "isopentenyl-PP";
  species MVD in default = 0;
  species dimethylallyl_PP in default = 0; dimethylallyl_PP is "dimethylallyl-PP";
  species geranyl_PP in default = 0; geranyl_PP is "geranyl-PP";
  species FDPS in default = 0;
  species GGPS1 in default = 0;
  species IDI2 in default = 0;
  species IDI1 in default = 0;
  species geranylgeranyl_PP in default = 0; geranylgeranyl_PP is "geranylgeranyl-PP";
  species acety_CoA in default = 0; acety_CoA is "acety-CoA";
  species HMGCR in default = 0;
  species acetoacetyl_CoA in default = 0; acetoacetyl_CoA is "acetoacetyl-CoA";
  species HMGCS1 in default = 0;
  species mevaldyl_CoA in default = 0; mevaldyl_CoA is "mevaldyl-CoA";
  species mevalonate in default = 0;
  species farnesyl_PP in default = 0; farnesyl_PP is "farnesyl-PP";

  // Reactions:
  re7: mevalonate => mevalonate_P; kc4*MVK*mevalonate/(km4 + mevalonate);  // modifiers: MVK
    kc4 = 21.9 substance; km4 = 0.0337 substance;
  re8: mevalonate_P => mevalonate_PP; kc5*PMVK*mevalonate_P/(km5 + mevalonate_P);  // modifiers: PMVK
    kc5 = 6.65 substance; km5 = 0.034 substance;
  re9: mevalonate_PP => isopentenyl_PP; kc6*MVD*mevalonate_PP/(km6 + mevalonate_PP);  // modifiers: MVD
    kc6 = 4.5 substance; km6 = 0.0262 substance;
  re10: isopentenyl_PP => dimethylallyl_PP; kc7*IDI1*isopentenyl_PP/(km7 + isopentenyl_PP) + kc8*IDI2*isopentenyl_PP/(km8 + isopentenyl_PP);  // modifiers: IDI1, IDI2
    kc7 = 6.65 substance; kc8 = 6.65 substance; km7 = 0.0279 substance; km8 = 0.0279 substance;
  re11: dimethylallyl_PP + isopentenyl_PP => geranyl_PP; kc9*isopentenyl_PP*dimethylallyl_PP*FDPS/((km9 + dimethylallyl_PP)*(km10 + isopentenyl_PP)) + kc10*isopentenyl_PP*dimethylallyl_PP*GGPS1/((km9 + dimethylallyl_PP)*(km10 + isopentenyl_PP));  // modifiers: FDPS, GGPS1
    kc9 = 6.65 substance; kc10 = 6.65 substance; km9 = 0.0351 substance; km10 = 0.0351 substance;
  re12: isopentenyl_PP + geranyl_PP => farnesyl_PP; kc11*isopentenyl_PP*geranyl_PP*FDPS/((re12_km11 + isopentenyl_PP)*(re12_km12 + geranyl_PP)) + kc12*isopentenyl_PP*geranyl_PP*GGPS1/((re12_km11 + isopentenyl_PP)*(re12_km12 + geranyl_PP));  // modifiers: FDPS, GGPS1
    kc11 = 6.65 substance; kc12 = 6.65 substance; re12_km11 = 0.0351 substance; re12_km12 = 0.0351 substance;
  re13: farnesyl_PP + isopentenyl_PP => geranylgeranyl_PP; kc13*GGPS1*isopentenyl_PP*farnesyl_PP/(km13*re13_km14);  // modifiers: GGPS1
    kc13 = 0.204 substance; km13 = 0.0027 substance; re13_km14 = 0.0027 substance;
  re14: acety_CoA + acetoacetyl_CoA => _3_hydroxy_3_methlglutaryl_CoA; kc1*acety_CoA*acetoacetyl_CoA*HMGCS1/((re14_km11 + acetoacetyl_CoA)*(re14_km12 + acety_CoA));  // modifiers: HMGCS1
    kc1 = 6.65 substance; re14_km11 = 0.0785 substance; re14_km12 = 0.0785 substance;
  re15: _3_hydroxy_3_methlglutaryl_CoA => mevaldyl_CoA; kc2*HMGCR*_3_hydroxy_3_methlglutaryl_CoA/(km2 + _3_hydroxy_3_methlglutaryl_CoA);  // modifiers: HMGCR
    kc2 = 0.0023 substance; km2 = 0.0765 substance;
  re16: mevaldyl_CoA => mevalonate; kc3*HMGCR*mevaldyl_CoA/(km3 + mevaldyl_CoA);  // modifiers: HMGCR
    kc3 = 0.0023 substance; km3 = 0.0765 substance;
  re17: farnesyl_PP => presqualene_PP; kc14*FDFT1*farnesyl_PP*farnesyl_PP/((re17_km14 + farnesyl_PP)*(re17_km14 + farnesyl_PP));  // modifiers: FDFT1
    kc14 = 6.65 substance; re17_km14 = 0.0016 substance;
  re18: presqualene_PP => squalene; kc15*presqualene_PP*FDFT1/(km15 + presqualene_PP);  // modifiers: FDFT1
    kc15 = 6.65 substance; km15 = 0.0016 substance;

  // Unit definitions:
  unit substance = mole;
  unit volume = litre;
  unit area = metre^2;
  unit length = metre;
  unit time = second;
end
